atom_style full
units real


bond_style harmonic
angle_style harmonic
dihedral_style opls
improper_style cvff

pair_style lj/charmm/coul/long 9.0 11.0
pair_style  lj/charmm/coul/long 10.0 10.5 10.5

pair_modify mix arithmetic
special_bonds lj/coul 0.0 0.0 0.5
kspace_style pppm 0.0001
